# to be able to add sofa objects you need to first load the plugins that implement them.
# For simplicity you can load the plugin "SofaComponentAll" that will load all most
# common sofa objects.
import SofaRuntime
SofaRuntime.importPlugin("SofaComponentAll")

# to add elements like Node or objects
import Sofa.Core
root = Sofa.Core.Node()

import math
import numpy as np

import os
path = os.path.dirname(os.path.abspath(__file__))+'/plot/'


class FingerController(Sofa.Core.Controller):

	def __init__(self, *args, **kwargs):
		Sofa.Core.Controller.__init__(self,*args, **kwargs) #needed

		self.node = kwargs['node']
		self.minimum = 0
		self.max = 0
		self.posmin = 0
		self.posmax = 0
		self.Positions =  kwargs['position']

		for i in range(0, len(self.Positions)):
			if self.Positions[i][2] <= self.max :
				self.max = self.Positions[i][2]
				self.posmax = i

		for j in range(0, len(self.Positions)):
			if self.Positions[j][2] >= self.minimum:
				self.minimum = self.Positions[j][2]
				self.posmin = j

		self.z1 = 31.5
		self.z2 = 18
		self.z3 = 4.5
		self.z4 = - 9
		self.z5 = -22.5
		self.z6 = -36


		self.posz1 = 0
		self.posz2 = 0
		self.posz3 = 0
		self.posz4 = 0
		self.posz5 = 0
		self.posz6 = 0


		for k in range(0, len(self.Positions)):
			if self.Positions[k][2] == self.z1 and self.Positions[k][1] >= 7. and self.Positions[k][1] <= 7.1   :
				self.z1 = self.Positions[k][2]
				self.posz1 = k


		for m in range(0, len(self.Positions)):
			if self.Positions[m][2] == self.z2 and self.Positions[m][1] >= 7 and self.Positions[m][1] <= 7.1:
				self.posz2 = m

		for l in range(0, len(self.Positions)):
			if self.Positions[l][2] == self.z3 and self.Positions[l][1] >= 7 and self.Positions[l][1] <= 7.11:
				self.posz3 = l

		for n in range(0, len(self.Positions)):
			if self.Positions[n][2] == self.z4 and self.Positions[n][1] >= 7 and self.Positions[n][1] <= 7.1:
				self.posz4 = n

		for o in range(0, len(self.Positions)):
			if self.Positions[o][2] == self.z5 and self.Positions[o][1] >= 7 and self.Positions[o][1] <= 7.1:
				self.posz5 = o

		for p in range(0, len(self.Positions)):
			if self.Positions[p][2] == self.z6 and self.Positions[p][1] >= 7 and self.Positions[p][1] <= 7.1:
				self.posz6 = p


		print(str(self.posz1)+ ' '+ str(self.posz2)+ ' '+str(self.posz3)+ ' '+ str(self.posz4)+' '+str(self.posz5)+ ' '+str(self.posz6)+'\n')


		self.pressureValue =  kwargs['pressure']

		self.coeff = (self.Positions[self.posmax][2]-self.Positions[self.posmin][2])/(self.Positions[self.posmax][1]-self.Positions[self.posmin][1])
		self.angle = (math.atan(self.coeff))*(180/math.pi)

		print(str(self.angle) +' ' + str(self.posmax)+ ' ' + str(self.posmin) + '\n')

		#self.tetra = kwargs['tetrahedra']

		#self.tetra_reinf = []

		#my_file = open("indices1.txt", "r")
		#content = my_file.readlines()

		#for i in range(0, len(content)):
		#	content[i] = int(content[i])
		#	pos = content[i]
		#	file1 = open("/home/pasquale/Script_Sofa/Antonio_hydrogel/tetra.txt","a")
		#	file1.write(str(self.tetra[pos])+ ' ' )
		#	file1.close()

		file1 = open("/home/pasquale/Script_Sofa/Antonio_hydrogel/plot/Position1.txt","w")
		file1.write(str(0.0)+' '+str(self.Positions[self.posmax][0])+ ' ' + str(self.Positions[self.posmax][1])+ ' '+ str(self.Positions[self.posmax][2]) + '\n' )
		file1.close()

		file2 = open("/home/pasquale/Script_Sofa/Antonio_hydrogel/plot/Pressure-Angle1.txt","w")
		file2.write(str(0.0)+' '+str(0.0)+ ' ' + str(0.0) + '\n' )
		file2.close()


		file3 = open("/home/pasquale/Script_Sofa/Antonio_hydrogel/plot/Point-for-curvature.txt","w")
		file3.write(str(0.0)+str(self.Positions[self.posz1][2])+' '+ str(self.Positions[self.posz2][2])+ ' '+str(self.Positions[self.posz3][2])+' '+str(self.Positions[self.posz4][2])+' '+str(self.Positions[self.posz5][2])+' '+str(self.Positions[self.posz6][2])+' '+' '+str(self.Positions[self.posmax][2])+' '+'\n' )
		file3.write(str(0.0)+str(self.Positions[self.posz1][1])+' '+ str(self.Positions[self.posz2][1])+' '+ str(self.Positions[self.posz3][1])+' '+str(self.Positions[self.posz4][1])+' '+str(self.Positions[self.posz5][1])+' '+str(self.Positions[self.posz6][1])+' '+str(self.Positions[self.posmax][1])+' '+'\n' )
		file3.close()


	def onAnimateBeginEvent(self,event):


		##Inflating the finger

		self.time = self.node.time.value

		pressure = self.pressureValue.value[0] + 5e-3

		if pressure >= 0.25:
			pressure = 0.25

			file3 = open("/home/pasquale/Script_Sofa/Antonio_hydrogel/plot/Point-for-curvature.txt","w")
			file3.write(str(0.0)+str(self.Positions[self.posz1][2])+' '+ str(self.Positions[self.posz2][2])+ ' '+str(self.Positions[self.posz3][2])+' '+str(self.Positions[self.posz4][2])+' '+str(self.Positions[self.posz5][2])+' '+str(self.Positions[self.posz6][2])+' '+' '+str(self.Positions[self.posmax][2])+' '+'\n' )
			file3.write(str(0.0)+str(self.Positions[self.posz1][1])+' '+ str(self.Positions[self.posz2][1])+' '+ str(self.Positions[self.posz3][1])+' '+str(self.Positions[self.posz4][1])+' '+str(self.Positions[self.posz5][1])+' '+str(self.Positions[self.posz6][1])+' '+str(self.Positions[self.posmax][1])+' '+'\n' )
			file3.close()


		self.pressureValue.value[0] = pressure

		coeff = (self.Positions[self.posmax][2]-self.Positions[self.posmin][2])/(self.Positions[self.posmax][1]-self.Positions[self.posmin][1])
		angle = (math.atan(coeff))*(180/math.pi)+88.89

		print(angle)

		file1 = open("/home/pasquale/Script_Sofa/Antonio_hydrogel/plot/Position1.txt","a")
		file1.write(str(self.time)+' '+str(self.Positions[self.posmax][0])+ ' ' + str(self.Positions[self.posmax][1])+ ' '+ str(self.Positions[self.posmax][2]) + '\n' )
		file1.close()

		file2 = open("/home/pasquale/Script_Sofa/Antonio_hydrogel/plot/Pressure-Angle1.txt","a")
		file2.write(str(self.time)+' '+str(pressure)+ ' ' + str(angle) + '\n' )
		file2.close()


def createScene(rootNode):

	rootNode.addObject('RequiredPlugin', pluginName='SoftRobots SofaOpenglVisual SofaSparseSolver SofaPreconditioner SofaMiscCollision SofaTopologyMapping ModelOrderReduction')
	rootNode.addObject('VisualStyle', displayFlags='showVisualModels showBehaviorModels hideCollisionModels hideBoundingCollisionModels hideForceFields hideInteractionForceFields hideWireframe')
	rootNode.addObject('RequiredPlugin', name='SoftRobots')
	rootNode.addObject('RequiredPlugin', name='SofaPython3')
	rootNode.addObject('RequiredPlugin', name='SofaSparseSolver')

	rootNode.gravity=[ 0,0,-9810]
	rootNode.dt = 0.001
	rootNode.name = 'rootNode'
	rootNode.addObject('FreeMotionAnimationLoop')
	rootNode.addObject('GenericConstraintSolver', tolerance=1e-12, maxIterations=10000)
	rootNode.addObject('DefaultPipeline')
	rootNode.addObject('BruteForceDetection')
	rootNode.addObject('DefaultContactManager', response='FrictionContact', responseParams='mu=0.6')
	rootNode.addObject('LocalMinDistance', name='Proximity', alarmDistance=5, contactDistance=1, angleCone=0.0)
	rootNode.addObject('OglSceneFrame', style='Arrows', alignment='TopRight')

	finger = rootNode.addChild('finger')
	finger.addObject('EulerImplicitSolver', name='odesolver', rayleighStiffness=0.1, rayleighMass=0.1)
	finger.addObject('CGLinearSolver', iterations='1000', tolerance='1e-12',threshold='1e-12',name='directSolver')
	#finger.addObject('SparseLDLSolver', name = 'directSolver' )
	finger.addObject('MeshVTKLoader', name='loader', filename='design1/Actuator_TubeReinforcementA_v3.vtk')
	tetras = finger.addObject('MechanicalObject', name='tetras', template='Vec3d', src = '@loader')
	finger.addObject('TetrahedronSetTopologyContainer', name="topo", src ='@loader')
	finger.addObject('TetrahedronSetTopologyModifier' ,  name="Modifier", listening = True)
	finger.addObject('TetrahedronSetGeometryAlgorithms', template="Vec3d" ,name="GeomAlgo", listening = True)

	#finger.addObject('MeshMatrixMass', massDensity='9.155e-9', src = '@topo')
	finger.addObject('UniformMass', totalMass='30e-6', src = '@topo')


	k0 = 2/30.4607760e-5
	mu1 = 2*134.3008821


	finger.addObject('TetrahedronHyperelasticityFEMForceField', template='Vec3d', name='FEM', ParameterSet=str(mu1)+' '+str(k0),materialName="NeoHookean")

	#finger.addObject('TetrahedronHyperelasticityFEMForceField', template='Vec3d', name='FEM', ParameterSet=str(mu)+' '+str(k0),materialName="NeoHookean")

	finger.addObject('BoxROI', name='boxROI', box=[-24,-15,45, 24,15, 60], drawBoxes=True)
	finger.addObject('RestShapeSpringsForceField', points='@boxROI.indices', stiffness=1e12, angularStiffness=1e12)
	finger.addObject('LinearSolverConstraintCorrection', solverName='directSolver')


	modelSubTopo = finger.addChild('modelSubTopo')
	modelSubTopo.addObject('TetrahedronSetTopologyContainer',position = '@../loader.position', name= 'container', tetrahedra = '2789  24487   6310   6308'+'\n'+'6088   7806  17222   6090'+'\n'+'3289   6641  15548   6639'+'\n'+'6307  15598  23749   6305'+'\n'+'36929   9752   9521   9750'+'\n'+'10749  16177  10751  10883'+'\n'+'19938   8715   8310   8716'+'\n'+'19159   9831  10044  10042'+'\n'+'7663   7664  16282   5877'+'\n'+'15911   6257   6259   7830'+'\n'+'20003   8302   8712   8711'+'\n'+'19865   9278   9334   9277'+'\n'+'4165  4164   220  7068'+'\n'+'35417   4332   4540   4539'+'\n'+'8159  17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
	modelSubTopo.addObject('TetrahedronSetTopologyModifier', name = 'modifier1')
	modelSubTopo.addObject('TetrahedronSetGeometryAlgorithms', name="GeomAlgo1",src = '@container', template = "Vec3d")
	modelSubTopo.addObject('SubsetTopologicalMapping', input="@../topo", output="@container", samePoints= 'true', handleTetrahedra = True, printLog = True)
	modelSubTopo.addObject('MechanicalObject')
	modelSubTopo.addObject('IdentityMapping')
	modelSubTopo.addObject('TetrahedronFEMForceField', template='Vec3d', name='FEM', method = 'large', poissonRatio = 0.39, youngModulus = 45000, src = '@container')


	cavity = finger.addChild('cavity')
	cavity.addObject('MeshObjLoader', name='cavityLoader', filename='design1/Cavity1.obj')
	cavity.addObject('MeshTopology', src='@cavityLoader', name='cavityMesh')
	cavity.addObject('MechanicalObject', name='cavity')
	cavity.addObject('SurfacePressureConstraint', name='SurfacePressureConstraint', template='Vec3d', value= 0, triangles='@cavityMesh.triangles', valueType='pressure')
	cavity.addObject('BarycentricMapping', name='mapping', mapForces=False, mapMasses=False)
	cavity.addObject(FingerController(node=rootNode, position = rootNode.finger.tetras.position.value, tetrahedra = rootNode.finger.loader.tetrahedra.value, pressure = rootNode.finger.cavity.SurfacePressureConstraint))

	modelVisu = finger.addChild('visu')
	modelVisu.addObject('MeshObjLoader', name='loader', filename='design1/Actuator_Tube_v8.obj')
	modelVisu.addObject('OglModel', src='@loader', color='yellow')
	modelVisu.addObject('BarycentricMapping')

	modelVisu1 = finger.addChild('visu1')
	modelVisu1.addObject('MeshObjLoader', name='loader', filename='design1/Actuator_Reinforcement_v9.obj')
	modelVisu1.addObject('OglModel', src='@loader', color=[1,1,1,255])
	modelVisu1.addObject('BarycentricMapping')


	return rootNode
