# -*- coding: utf-8 -*-

import Sofa
import os

path = os.path.dirname(os.path.abspath(__file__))+'/design/'


def createScene(rootNode):

	rootNode.createObject('RequiredPlugin', pluginName='SoftRobots SofaOpenglVisual SofaSparseSolver SofaPreconditioner ModelOrderReduction SofaMiscCollision  ')
	rootNode.createObject('VisualStyle', displayFlags='showVisualModels showBehaviorModels hideCollisionModels hideBoundingCollisionModels hideForceFields hideInteractionForceFields hideWireframe')
	rootNode.createObject('RequiredPlugin', name='SoftRobots')
	rootNode.createObject('RequiredPlugin', name='SofaPython')
	rootNode.createObject('RequiredPlugin', name='SofaSparseSolver')

	rootNode.findData('gravity').value='0 0 -9810'
	rootNode.findData('dt').value= '0.001'
	rootNode.createObject('FreeMotionAnimationLoop')
	rootNode.createObject('GenericConstraintSolver', tolerance=1e-12, maxIterations=10000)
	rootNode.createObject('DefaultPipeline')
	rootNode.createObject('BruteForceDetection')
	rootNode.createObject('DefaultContactManager', response='FrictionContact', responseParams='mu=0.6')
	rootNode.createObject('LocalMinDistance', name='Proximity', alarmDistance=5, contactDistance=1, angleCone=0.0)
	rootNode.createObject('OglSceneFrame', style='Arrows', alignment='TopRight')

	finger = rootNode.createChild('finger')
	finger.createObject('EulerImplicitSolver', name='odesolver', rayleighStiffness=0.1, rayleighMass=0.1)
	finger.createObject('CGLinearSolver', iterations='1000', tolerance='1e-12',threshold='1e-12',name='directSolver')
	#finger.createObject('SparseLDLSolver', name = 'directSolver' )
	finger.createObject('MeshVTKLoader', name='loader', filename=path+'Actuator_TubeReinforcementA_v3.vtk')
	tetras = finger.createObject('MechanicalObject', name='tetras', template='Vec3d', src = '@loader')
	finger.createObject('TetrahedronSetTopologyContainer', name="topo", src ='@loader')
	finger.createObject('TetrahedronSetTopologyModifier' ,  name="Modifier", listening = True)
	finger.createObject('TetrahedronSetGeometryAlgorithms', template="Vec3d" ,name="GeomAlgo", listening = True, drawTriangles =1)

	#finger.createObject('MeshMatrixMass', massDensity='9.155e-9', src = '@topo')
	finger.createObject('UniformMass', totalMass='30e-6', src = '@topo')


	k0 = 2/30.4607760e-5
	mu1 = 2*134.3008821


	finger.createObject('TetrahedronHyperelasticityFEMForceField', template='Vec3d', name='FEM', ParameterSet=str(mu1)+' '+str(k0),materialName="NeoHookean")


	finger.createObject('BoxROI', name='boxROI', box=[-24,-15,45, 24,15, 60], drawBoxes=True)
	finger.createObject('RestShapeSpringsForceField', points='@boxROI.indices', stiffness=1e12, angularStiffness=1e12)
	finger.createObject('GenericConstraintCorrection', ODESolverName='odesolver', solverName = 'directSolver')


	modelSubTopo = finger.createChild('modelSubTopo')
	modelSubTopo.createObject('TetrahedronSetTopologyContainer',position = '@../loader.position', name= 'container', tetrahedra = '2789  24487   6310   6308'+'\n'+'6088   7806  17222   6090'+'\n'+'3289   6641  15548   6639'+'\n'+'6307  15598  23749   6305'+'\n'+'36929   9752   9521   9750'+'\n'+'10749  16177  10751  10883'+'\n'+'19938   8715   8310   8716'+'\n'+'19159   9831  10044  10042'+'\n'+'7663   7664  16282   5877'+'\n'+'15911   6257   6259   7830'+'\n'+'20003   8302   8712   8711'+'\n'+'19865   9278   9334   9277'+'\n'+'4165  4164   220  7068'+'\n'+'35417   4332   4540   4539'+'\n'+'8159 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
	modelSubTopo.createObject('TetrahedronSetTopologyModifier', name = 'modifier1')
	modelSubTopo.createObject('TetrahedronSetGeometryAlgorithms', name="GeomAlgo1",src = '@container', template = "Vec3d")
	#modelSubTopo.createObject('SubsetTopologicalMapping', input="@../topo", output="@container", samePoints= 'true', handleTetrahedra = True, printLog = True)
	modelSubTopo.createObject('MechanicalObject')
	modelSubTopo.createObject('IdentityMapping')
	modelSubTopo.createObject('TetrahedronFEMForceField', template='Vec3d', name='FEM', method = 'large', poissonRatio = 0.39, youngModulus = 45000, src = '@container')


	cavity = finger.createChild('cavity')
	cavity.createObject('MeshObjLoader', name='cavityLoader', filename=path+'Cavity1.obj')
	cavity.createObject('MeshTopology', src='@cavityLoader', name='cavityMesh')
	cavity.createObject('MechanicalObject', name='cavity')
	cavity.createObject('SurfacePressureConstraint', name='SurfacePressureConstraint', template='Vec3d', value= 0, triangles='@cavityMesh.triangles', valueType='pressure')
	cavity.createObject('BarycentricMapping', name='mapping', mapForces=False, mapMasses=False)

	#modelVisu = finger.createChild('visu')
	#modelVisu.createObject('MeshObjLoader', name='loader', filename=path+'Actuator_Tube_v8.obj')
	#modelVisu.createObject('OglModel', src='@loader', color='yellow')
	#modelVisu.createObject('BarycentricMapping')

	#modelVisu1 = finger.createChild('visu1')
	#modelVisu1.createObject('MeshObjLoader', name='loader', filename=path+'Actuator_Reinforcement_v9.obj')
	#modelVisu1.createObject('OglModel', src='@loader', color=[1,1,1,255])
	#modelVisu1.createObject('BarycentricMapping')


	return rootNode
